units lj
atom_style atomic
boundary p p p

read_data atoms/l2.5-r0.0.atoms

mass 1 1.0

reset_timestep  0
timestep        0.001

pair_style lj/cut 3.5
pair_modify shift yes
pair_coeff 1 1 1.0 1.0 3.5

fix 1 all nvt temp 0.8 0.8 0.01

dump id all atom 100000 dump.melt/l2.5-r0.0-T0.8.dump

run 10000000
